# Poszukiwanie miejsc zerowych
# Znajdź miejsca zerowe funkcji f(x)=e^(-2x)-1+x^2 z dokładnością 10^-6 za pomocą metod:
# - bisekcji
# - stycznych
# - siecznych
#
# 1. Wykonaj wykres funkcji oraz jej pierwszej i drugiej pochodnej na jednym rysunku
# (pamiętaj o odpowiednim sformatowaniu wykresu!).
#
# 2. Dla każdej metody:
#
# a) wypisz warunki wystarczające zbieżności funkcji w przedziale izolacji pierwiastka
#
# b) dobierz odpowiednie przedziały izolacji tak, aby zagwarantować zbieżność metody
# i wykaż, że funkcja spełnia warunki wystarczające w tych wybranych przedziałach
#
# c) zaimplementuj algorytm metody z uwzględnieniem licznika iteracji
#
# d) wyznacz miejsca zerowe i sprawdź czy uzyskany wynik jest przybliżeniem pierwiastka
# z zadaną dokładnością
#
# e) podaj odpowiedź
#
# 3. Porównaj efektywność wszystkich metod w tym przypadku (na podstawie ilości
# wykonanych iteracji).
# Zadanie 1:
f(x) := e^(-2*x) + x^2 - 1  # - zdefiniowana funkcja f(x)
fp(x) := -2*e^(-2*x) + 2*x  # - zdefiniowana pierwsza pochodna f'(x)
fpp(x) := 4*e^(-2*x) + 2  # - zdefiniowana druga pochodna f''(x)
x := -0.5, -0.5 + 0.001 .. 1.5  # - zakres wartosci x
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# Zadanie 2:
# a) wypisz warunki wystarczające zbieżności funkcji w przedziale izolacji pierwiastka
# Warunki wystarczające:
# * funkcja f(x) jest ciagla w przedziale [a,b]
# * wartosci f(x) na koncach przedzialu przyjmuja przeciwne znaki f(a)*f(b)<0
# * Pierwsza i druga pochodna funkcji f(x) istnieja i sa ciagle w przedziale [a,b]
# * Pierwsza i druga pochodna maja staly znak w przedziale [a,b]
# b) dobierz odpowiednie przedziały izolacji tak, aby zagwarantować zbieżność metody  i wykaż, że funkcja spełnia warunki wystarczające w tych wybranych przedziałach
# c) zaimplementuj algorytm metody z uwzględnieniem licznika iteracji
bisekcja(a, b, eps) :=
    iter ← 0
    c ← (a + b)/2
    while |f(c)| > eps
        a ← c if f(b)*f(c) < 0
        b ← c if f(a)*f(c) < 0
        c ← (a + b)/2
        iter ← iter + 1
    V[0] ← c
    V[1] ← iter
    return V
styczne(a, b, eps) :=
    V[0] ← a if f(a)*fpp(a) ≥ 0
    V[0] ← b otherwise
    V[1] ← 0
    while |f(V[0])| > eps
        V[0] ← V[0] - f(V[0])/fp(V[0])
        V[1] ← V[1] + 1
    return V
sieczne(a, b, eps) :=
    V ← [b; 0]
    last_mem ← a
    while |f(V[0])| > eps
        t ← V[0]
        V[0] ← t - f(t)/(f(last_mem) - f(t))*(last_mem - t)
        last_mem ← t
        V[1] ← V[1] + 1
    return V
# d) wyznacz miejsca zerowe i sprawdź czy uzyskany wynik jest przybliżeniem pierwiastka  z zadaną dokładnością
# deklaracja epsilon, oraz poczatku i konca przedzialu pocz, kon
epsilon := 0.000001
pocz1 := -0.5
kon1 := 0.2
pocz2 := 0.5
kon2 := 2.5
# dla bisekcji:
bisekcja(pocz1, kon1, epsilon) = [9.53674e-8; 19]
bisekcja(pocz2, kon2, epsilon) = [0.916563; 19]
# dla stycznych:
styczne(pocz1, kon1, epsilon) = [-9.19163e-11; 5]
styczne(pocz2, kon2, epsilon) = [0.916563; 5]
# dla siecznych:
sieczne(pocz1, kon1, epsilon) = [8.06817e-9; 6]
sieczne(pocz2, kon2, epsilon) = [0.916563; 7]
# e) podaj odpowiedź
# Metoda bisekcji daje słabe przybliżenie, przy dużym nakładzie iteracji, metoda siecznych jest dużo lepsza od metody bisekcji jeśli chodzi o dokładność i liczbe iteracji, najlepsza pod względem dokładności i liczby iteracji jest metoda stycznych.
